# 1-turn Tracking
# [component: outputs SPI_SEQ]
j_1 := 1
j_2 := j_1 + 32
rows(SPI_SEQ) = 2114
cols(SPI_SEQ) = 6
i := 0 .. rows(SPI_SEQ) - 1
j := j_1, j_2 .. (3*10^6)/10
iter[i] := SPI_SEQ[i, 0]
eid[i] := SPI_SEQ[i, 1]
ray[i] := SPI_SEQ[i, 2]
SX[i] := SPI_SEQ[i, 3]
SY[i] := SPI_SEQ[i, 4]
SZ[i] := SPI_SEQ[i, 5]
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# [component: outputs RAY_SEQ]
rows(RAY_SEQ) = 2143
cols(RAY_SEQ) = 9
i := 0 .. rows(RAY_SEQ) - 1
iter[i] := RAY_SEQ[i, 0]
eid[i] := RAY_SEQ[i, 1]
ray[i] := RAY_SEQ[i, 2]
X[i] := RAY_SEQ[i, 3]
A[i] := RAY_SEQ[i, 4]
Y[i] := RAY_SEQ[i, 5]
B[i] := RAY_SEQ[i, 6]
T[i] := RAY_SEQ[i, 7]
D[i] := RAY_SEQ[i, 8]
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