## Fundamental constants and equations
c := 2.997924*10^8  # m/s
# speed of light
β(γ) := sqrt(1 - 1/γ^2)
m_p := 0.938*10^9  # eV  # proton mass
q := 1.6*10^-19  # C  # заряд,  # Кл
E_kin
# full kinetic energy of beam
γ_b(E_kin) := E_kin/m_p + 1
# W | kinetic energy per nuclon
A
# mass
W(E_kin, A, Z) := Z/A*E_kin
# Z | charge
γ_nuc(E_kin, A, Z) := W(E_kin, A, Z)/m_p + 1
(1.248 - 1)*m_p = 232624000
## Dipole magnets
# General | Experement | Elements
E_exp := 4000  # MeV
B_max := 1.8  # T
L_NICA := 503.04
A := 2
Z := 1
L_mag_old := 1.44  # m
L_Nuc := L_NICA/2 = 251.52
L_free := 52
3.35*4 = 13.4
NMASS := 931  # MeV/u
L_mag48 := L_mag_old*96 - L_free = 86.24
L_Nuc/8 = 31.44
m_p := 1.6726*10^-27
N_mag := 48
35.0877*8 = 280.702
e := 1.6022*10^-19
L_mag := L_mag48/N_mag = 1.79667
L_Nuc/16 = 15.72
c = 299792400
L_mag := 1.797
L_def := 6.5
L_quad := 0.4
L_arc := 13
8*L_def + L_free + (8*6)*L_mag + (8*6 + 8*4)*L_quad = 222.256
8*((L_Nuc - L_arc*8)/8 - L_def - 4*L_quad) = 82.72
ρ := (8*6)*L_mag/(2*π) = 13.7281
Bρ := B_max*ρ = 24.7105
31.3732 - 16.2559 = 15.1173
βγ := Bρ*e/(A*m_p*c) = 3.94781
γ_max := sqrt(βγ^2 + 1) = 4.07249
l_h := 15.117
α := 0.084
β_max := βγ/γ_max = 0.969384
r_def := l_h/(2*sin(2*α/2)) = 90.088
E_kin := (γ_max - 1)*NMASS*A = 5720.98  # MeV/u
r_def*2*α = 15.1348
## Spin in E-M element
E_pol := 100*10^6  # eV (270 MeV)
J_0(Φ_s) := 1 - Φ_s^2/4  # the effective contribution to the expected EDM signal decreases by a factor
γ_b(E_pol) = 1.10661
ν_s_B(γ_b, G) := γ_b*G
# deutron
# proton
ν_s_E(γ_b, G) := β(γ_b)^2*γ_b*(G - 1/(γ_b^2 - 1))
Z_p := 1
Z_d := 1
A_p := 1
A_d := 2
K(γ, G) := ν_s_E(γ, G)/ν_s_B(γ, G)
G_p := 1.79
G_d := -0.142
W(E_pol, A_d, Z_d) = 50000000
W(E_pol, A_p, Z_p) = 100000000
α_neg(γ, G, N) := 1/(K(γ, G) - 1)*1/N  # π
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γ_nuc(E_pol, A_d, Z_d) = 1.0533
γ_nuc(E_pol, A_p, Z_p) = 1.10661
α_pos(γ, G, N) := 1/(1 - K(γ, G))*1/N  # π
γ_mag := sqrt(1/G_p + 1) = 1.24846
n_arc := 8
φ_arc := 360/n_arc = 45  # degrees
# proton | deutron
γ_b(E_pol)*G_p = 1.98083
γ_b(E_pol)*G_d = -0.157139
ν_s_B(γ_b(E_pol), G_p) = 1.98083
ν_s_B(γ_b(E_pol), G_d) = -0.157139
K(γ_b(270*10^6), G_d) = 4.6431
ν_s_B(γ_b(E_pol), G_p)*φ_arc = 89.1374
ν_s_B(γ_b(E_pol), G_d)*φ_arc = -7.07124  # spin rotation in one arc by dipoles correspond to momentum
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K(γ_b(0.001), G_p) = -0.558659
Φ_sp := (π*ν_s_B(γ_b(E_pol), G_p))/n_arc = 0.777871
Φ_sd := (π*ν_s_B(γ_b(E_pol), G_d))/n_arc = -0.0617082
0.026*π*360/(2*π) = 4.68
1/(4.643 - 1)*1/16 = 0.0171562
J_0(Φ_sp) = 0.848729
J_0(Φ_sd) = 0.999048
(1 - J_0(Φ_sp))*100 = 15.1271
(1 - J_0(Φ_sd))*100 = 0.0951975
2.55/16 = 0.159375
1.1/16 = 0.06875
ν_s_E(γ_b(E_pol), G_p) = -0.540382
ν_s_E(γ_b(E_pol), G_d) = -0.93248
ν_s_E(γ_b(E_pol), G_p)/ν_s_B(γ_b(E_pol), G_p) = -0.272806
ν_s_E(γ_b(E_pol), G_d)/ν_s_B(γ_b(E_pol), G_d) = 5.93412
α_pos(γ_b(E_pol), G_p, n_arc)*360/2 = 17.6775
α_neg(γ_b(E_pol), G_d, n_arc)*360/2 = 4.56008
α_pos(γ_b(E_pol), G_p, n_arc) = 0.0982082  # π
α_neg(γ_b(E_pol), G_d, n_arc) = 0.0253338  # π
α_neg(γ_nuc(E_pol, A_d, Z_d), G_d, n_arc) = 0.0229519
ν_s_B(γ_b(E_pol), G_p)*((2*π)/n_arc - 2*π*α_pos(γ_b(E_pol), G_p, n_arc))*360/(2*π) = 19.1052
ν_s_B(γ_b(E_pol), G_d)*((2*π)/n_arc + 2*π*α_neg(γ_b(E_pol), G_d, n_arc))*360/(2*π) = -8.50437
ν_s_E(γ_b(E_pol), G_d)*(-2*π*α_neg(γ_b(E_pol), G_d, n_arc))*360/(2*π) = 8.50437
ν_s_E(γ_b(E_pol), G_p)*(2*π*α_pos(γ_b(E_pol), G_p, n_arc))*360/(2*π) = -19.1052
0.034*π*360/(2*π) = 6.12
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# π
# eV
## Electrostatic deflectors
E_max := 10*10^6  # V/m
β(γ_b(270*10^6)) = 0.630129
β(γ_b(100*10^6)) = 0.428249
γ_b(270*10^6) = 1.28785
γ_b(100*10^6) = 1.10661
m_p := 1.67*10^-27  # kg
α := 0.034*π
α := 0.098/2*π
R := m_p*c^2/q*β(γ_b(270*10^6))^2*γ_b(270*10^6)/E_max = 47.9691
l_def := m_p*c^2/q*β(γ_b(270*10^6))^2*γ_b(270*10^6)/E_max*2*α
R_cm := R*10^2 = 4796.91
l_def := m_p*c^2/q*β(γ_b(100*10^6))^2*γ_b(100*10^6)/E_max*2*α = 5.86139
# 10 | MV/m
10*10^6*10^-3/10^2 = 100  # kV/cm
l_def*8 = 46.8911
γ := 1.28
G := -0.17
γ*G = -0.2176
(γ*G + γ/(γ + 1))*β(γ)^2 = 0.133962
-(γ*G + 1) = -0.7824
## WF & El.deflector
# 'правое вращение' (по часовой стрелке) выбрано положительным
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γ := 1.14395295
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β := β(γ) = 0.485635
β^2 = 0.235841
Φ_p_WF := 0.145835
G := -0.142
N := 8  # parameter  # (depend on E/M field in WF)
Φ_p_WF := 0.212435
ν_s_E := γ*β^2*(G - 1/(γ^2 - 1)) = -0.912472
Φ_pB_WF := 0.170101 = 0.170101
Φ_pE_WF := -0.170101 = -0.170101
ν_s_B := γ*G = -0.162441
ν_s_E/ν_s_B = 5.61724
Φ_pB_WF + Φ_pE_WF = 0
Φ_pB_WF*180/π = 9.74607
# magnetic arc | wien filter | elstat deflector
Φ_s_B := (γ*G + 1)*Φ_pB_WF = 0.14247
Φ_s_B*180/π = 8.16291
Φ_p_arc := 2*π/N = 0.785398
Φ_p_arc*180/π = 45
α := 1/(ν_s_E/ν_s_B - 1)*π/N = 0.0850506
α*180/π = 4.87304
α/π = 0.0270724
Φ_s_E := (γ*G + γ/(γ + 1))*β^2*Φ_pE_WF = -0.0148886
Φ_s_E*180/π = -0.853052
Φ_s_arc := (γ*G)*Φ_p_arc = -0.127581
Φ_s_arc*180/π = -7.30986
Φ_s_WF := Φ_s_B + Φ_s_E = 0.127581
Φ_s_WF*180/π = 7.30985
Φ_p_B := 2*π/N + 2*α = 0.955499
Φ_p_B*180/π = 54.7461
γ*G = -0.162441
ν_s_E*Φ_pE_WF = 0.155212
Φ_p_def := -2*α = -0.170101
Φ_p_def*180/π = -9.74608
ν_s_B*Φ_pB_WF = -0.0276314
-(γ^2*G)/(G + 1)*Φ_p_arc = 0.170101
Φ_per := Φ_p_B + Φ_p_def = 0.785398
Φ_per*180/π = 45
ν_s_E*Φ_pE_WF + ν_s_B*Φ_pB_WF = 0.127581
-(γ^2*G)/(G + 1)*Φ_p_arc*180/π = 9.74608
Φ_s_arc + Φ_s_WF = -1.16421e-7
Φ_s_B := Φ_p_B*ν_s_B = -0.155213
Φ_s_B*180/π = -8.89303
(Φ_s_arc + Φ_s_WF)*180/π = -6.67042e-6
1.289*1.79*2*π/(1*N)*180/π = 103.829
Φ_s_E := ν_s_E*Φ_p_def = 0.155213
Φ_s_E*180/π = 8.89303
(γ*G + 1)/((γ*G + γ/(γ + 1))*β^2) = 9.56906
Φ_s := Φ_s_B + Φ_s_E = 0
Φ_s*180/π = 0
-(1.289^2*1.79)/(1.79 + 1)*Φ_p_arc = -0.83723
-(γ*G + 1) = -0.837559
-(1.289^2*1.79)/(1.79 + 1)*Φ_p_arc*180/π = -47.9697
(γ*G + γ/(γ + 1))*β^2 = 0.0875278
A := 2.0
γ := 1.14395295
β := sqrt(1 - 1/γ^2) = 0.485635
m_p := 1.6726*10^-27
m_d := 3.343583*10^-27
e := 1.6022*10^-19
c = 299792400
Φ_pE_WF = -0.170101
p_0 := β*γ*m_d*c = 5.56866e-19
Angdef := 0.0857245894353
E_WF := 13*10^6  # V/m
B_WF := 89*10^-3  # T
# In COSY
CHIM := p_0/e = 3.47563  # T*m
CHIE := p_0*c*β/e = 506016031  # T*m^2/s
CHIE := 5.06032*10^8
R_B := CHIM/B_WF = 39.0521  # m
R_E := CHIE/E_WF = 38.9255  # m
2*π/N*γ^2*(-0.142)/(-0.142 + 1)*CHIE/E_WF = -6.62128
L_WF := R_B*Φ_pB_WF = 6.64279
L_WF := R_E*Φ_pE_WF = -6.62127
L_WF*8 = -52.9702
γ := 1.289
Φ_pE_WF := 0.837
β := sqrt(1 - 1/γ^2) = 0.630985
p_0 := β*γ*m_p*c = 4.07835e-19
CHIE := p_0*c*β/e = 481512228
R_E := CHIE/E_WF = 37.0394  # m
L_WF := R_E*Φ_pE_WF = 31.002
2*π/N*γ^2*1.79/(1.79 + 1)*CHIE/E_WF = 31.0105
L_WF*N = 248.016
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γ_nuc(E_kin, m) := (E_kin*10^6)/(m/e*c^2) + 1
γ_nuc(270, m_p) = 1.28777
γ_nuc(270, m_d) = 1.14396
L_pB(G_part, m_part, γ_beam) := -(2*π/N*γ_beam^2*G_part/(G_part + 1)*(1 - 1/γ_beam^2)*γ_beam*m_part/e*c^2/(-E_WF))
L_p(E) := L_pB(G_p, m_p, γ_nuc(E, m_p))
L_d(E) := L_pB(G_d, m_d, γ_nuc(E, m_p))
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