# LENGHT
nbm := 96
lbm := (21.69*2*π)/nbm = 1.41961
lbm*100 = 141.961
lqm := 0.43908
lqm*100 = 43.908
DR1 := 3.505 + (0.425 - lqm) = 3.49092
DR1*100 = 349.092
DR2 := 0.1275 + 0.5*(0.425 - lqm) + 0.5*(1.44 - lbm) = 0.130656
DR2*100 = 13.0656
DR3 := 0.07 + (1.44 - lbm) = 0.0903928
DR3*100 = 9.03928
DR4 := 0.4275 + 0.5*(0.425 - lqm) + 0.5*(1.44 - lbm) = 0.430656
DR4*100 = 43.0656
QUADRUPOLES
K1QF := 0.788904
K1QD := 0.789945
QD := -25.5209  # T/m
QD*10/100 = -2.55209
1/sqrt(0.00186815) = 23.1363
# 25.4872 | 0.00186815
