# TWISS
# [component: outputs BETAX]
# [component: outputs BETAY]
# [component: outputs DISPX]
# [component: outputs DISPY]
3.75*π/180 = 0.0654498
rows(BETAX) = 67
cols(DISPX) = 2
rows(BETAY) = 67
cols(BETAY) = 2
rows(DISPX) = 67
rows(DISPY) =  # error: Эта переменная не определена.
i := 0 .. rows(BETAX) - 1
el[i] := BETAX[i, 1]
6.12*π/180 = 0.106814
β_x[i] := BETAX[i, 0]
β_y[i] := BETAY[i, 0]
D_x[i] := DISPX[i, 0]
D_y[i] := DISPY[i, 0]  # error: Эта переменная не определена.
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